<?xml version="1.0" encoding="UTF-8"?>
<neuroml xmlns="http://www.neuroml.org/schema/neuroml2"
    xmlns:xsi="http://www.w3.org/2001/XMLSchema-instance"
    xsi:schemaLocation="http://www.neuroml.org/schema/neuroml2 https://raw.github.com/NeuroML/NeuroML2/development/Schemas/NeuroML2/NeuroML_v2beta4.xsd"
    id = "NeuroML2_network_from_exported_cell">

    <include href="ca3pyr.cell.nml"/>

    <!-- Point process: Current clamp -->
    <pulseGenerator id="IClamp" delay="100ms" duration="100ms" amplitude="1.5nA" />

    <!-- Create a single-cell network -->

    <network id="network" type="networkWithTemperature" temperature="35 degC">

    <population id="Pop_ca3pyramidalcell" component="ca3pyramidalcell" size="1" type="populationList">
        <instance id="0">
            <location x="0" y="0" z="0"/>
        </instance>
    </population>

        <inputList id="IClamp" component="IClamp" population="Pop_ca3pyramidalcell">
            <input id="0" target="../Pop_ca3pyramidalcell/0/ca3pyramidalcell" destination="synapses"/>
        </inputList>

    </network>

</neuroml>
